// COMSOL Multiphysics 6.3.0.290 model "WG_TM01.mph"
// Outline of the model tree

Geometry
  geom1 "Geometry 1" (3D, length unit mm)
    cyl1: Cylinder | r = 25; h = 500
    fin: Finalize "Form Union"

Materials
  mat1: Common "Air" on all domains
    def: def "Basic"
      thermalexpansioncoefficient = alpha_p(pA,T)
      molarmass = 0.02897[kg/mol]
      bulkviscosity = muB(T)
      relpermeability = 1
      relpermittivity = 1
      dynamicviscosity = eta(T)
      ratioofspecificheat = 1.4
      electricconductivity = 0[S/m]
      heatcapacity = Cp(T)
      density = rho(pA,T)
      thermalconductivity = k(T)
      soundspeed = cs(T)
      eta: Piecewise | arg = T; pieces = {200.0, 1600.0, -8.38278E-7+8.35717342E-8*T^1-7.69429583E-11*T^2+4.6437266E-14*T^3-1.06585607E-17*T^4}; argunit = K; fununit = Pa*s
      Cp: Piecewise | arg = T; pieces = {200.0, 1600.0, 1047.63657-0.372589265*T^1+9.45304214E-4*T^2-6.02409443E-7*T^3+1.2858961E-10*T^4}; argunit = K; fununit = J/(kg*K)
      rho: Analytic | expr = pA*0.02897/R_const[K*mol/J]/T; args = {pA, T}; fununit = kg/m^3; argunit = {Pa, K}
      k: Piecewise | arg = T; pieces = {200.0, 1600.0, -0.00227583562+1.15480022E-4*T^1-7.90252856E-8*T^2+4.11702505E-11*T^3-7.43864331E-15*T^4}; argunit = K; fununit = W/(m*K)
      cs: Analytic | expr = sqrt(1.4*R_const[K*mol/J]/0.02897*T); args = T; fununit = m/s; argunit = K
      an1: Analytic | funcname = alpha_p; expr = -1/rho(pA,T)*d(rho(pA,T),T); args = {pA, T}; fununit = 1/K; argunit = {Pa, K}
      an2: Analytic "Analytic 2a" | funcname = muB; expr = 0.6*eta(T); args = T; fununit = Pa*s; argunit = K
    RefractiveIndex: RefractiveIndex
      n = 1
      ki = 0
    NonlinearModel: NonlinearModel
      BA = def.gamma-1
    idealGas: idealGas
      Rs = R_const/Mn
      heatcapacity = Cp(T)
      ratioofspecificheat = 1.4
      molarmass = 0.02897[kg/mol]
      Cp: Piecewise | arg = T; pieces = {200.0, 1600.0, 1047.63657-0.372589265*T^1+9.45304214E-4*T^2-6.02409443E-7*T^3+1.2858961E-10*T^4}; argunit = K; fununit = J/(kg*K)

Physics
  emw: ElectromagneticWaves "Electromagnetic Waves, Frequency Domain" on all domains
    dependent variable E = {Ex, Ey, Ez}
    MeshControl.SizeControlParameter = FromStudy
    wee1: WaveEquationElectric (default)
    pec1: PerfectElectricConductor (default)
    init1: init "Initial Values 1" (default)
    pec2: PerfectElectricConductor on boundaries 1, 2, 5, 6
    port1: Port on boundaries 3 | PortType = Numeric
    port2: Port on boundaries 4 | PortType = Numeric

Mesh
  mesh1 "Mesh 1" (physics-controlled)
    size: MeshSizeDefault | hauto = 4

Studies
  std1 "Study 1"
    bma: BoundaryModeAnalysis | modeFreq = 5[GHz]; shift = 0.395
    bma2: BoundaryModeAnalysis | PortName = 2; modeFreq = 5[GHz]; shift = 0.395
    freq: Frequency "Frequency Domain" | punit = GHz; plist = 5[GHz]; preusesol = auto

Solver configurations
  sol1 "Solution 1" (study std1)
    v1: Variables "Dependent Variables 1"
    e1: Eigenvalue "Eigenvalue Solver 1"
      dDef: Direct
    su1: StoreSolution "Solution Store 1"
    v2: Variables "Dependent Variables 2"
    e2: Eigenvalue "Eigenvalue Solver 2"
      dDef: Direct
    su2: StoreSolution "Solution Store 2"
    v3: Variables "Dependent Variables 3"
    s1: Stationary "Stationary Solver 1"
      p1: Parametric
      fc1: FullyCoupled
      i1: Iterative "Suggested Iterative Solver (emw)"
        mg1: Multigrid
  sol3 "Solution Store 2" (study std1)
  sol2 "Solution Store 1" (study std1)

Datasets
  dset1: Solution | solution = sol1
  dset2: Solution | solution = sol2
  dset3: Solution | solution = sol3
  cln1: CutLine3D | data = dset1; genpoints = {{0, 0, -2.40742E-32}, {0, 0, 500}}

Derived values
  gev1: EvalGlobal "S-parameter (emw)" | data = dset1; table = tbl1; expr = {emw.S11dB, emw.S21dB}
  gev2: EvalGlobal "Phase Velocity"
    data = dset1
    table = tbl2
    expr = c_const/emw.neff_2
    unit = m/s
    descr = Phase Velocity
  gev3: EvalGlobal "Wave Impedance"
    data = dset1
    table = tbl3
    expr = Z0_const*emw.neff_2
    unit = Ω
    descr = Wave Impedance
  max1: MaxVolume "Volume Maximum 1" on all domains
    data = dset1
    table = tbl4
    expr = emw.normE
    unit = V/m
    descr = Emax
  gev4: EvalGlobal "Power Max" | data = dset1; table = tbl5; expr = (3e6/1814.5)^2*1[W]; unit = MW; descr = Power Max

Tables
  tbl1: Table
    freq (GHz) | S11 (1) | S21 (1)
    5 | -69.9119 | -2.90525e-05
  tbl2: Table
    // Phase Velocity
    freq (GHz) | Phase Velocity (m/s)
    5 | 7.55786e+08
  tbl3: Table
    // Wave Impedance
    freq (GHz) | Wave Impedance (Ω)
    5 | 149.435
  tbl4: Table
    // Volume Maximum 1
    freq (GHz) | Emax (V/m)
    5 | 1814.46
  tbl5: Table
    // Power Max
    freq (GHz) | Power Max (MW)
    5 | 2.73356

Plots
  pg1: PlotGroup3D "Electric Field (emw)" | data = dset1
    mslc1: Multislice | expr = emw.normE
      filt1: Filter | expr = !isScalingSystemDomain
  pg2: PlotGroup3D "Electric Field, Logarithmic (emw)" | data = dset1
    surf1: Surface | expr = 1
      sel1: Selection on boundaries 1, 2, 5, 6
      tran1: Transparency | transparency = 0.85
      mtrl1: MaterialAppearance | appearance = custom; family = aluminumpolished
    surf2: Surface | expr = emw.normE
      sel1: Selection on boundaries 3, 4
      tran1: Transparency | transparency = 0.7
  pg3: PlotGroup3D "Electric Mode Field, Port 1 (emw)" | data = dset1
    surf1: Surface | expr = root.comp1.emw.normEbm_1
    ann1: Annotation | text = Effective mode index: eval(comp1.emw.neff_1)
  pg4: PlotGroup3D "Electric Mode Field, Port 2 (emw)" | data = dset1
    surf1: Surface | expr = root.comp1.emw.normEbm_2
    ann1: Annotation | text = Effective mode index: eval(comp1.emw.neff_2)
  pg5: PlotGroup1D "1D Plot Group 5" | data = dset1
    lngr1: LineGraph | data = cln1; expr = emw.Ez; descr = Electric field, z-component