// COMSOL Multiphysics 6.3.0.290 model "WG_TE11.mph"
// Outline of the model tree

Geometry
  geom1 "Geometry 1" (3D, length unit mm)
    cyl1: Cylinder | r = 25; h = 500
    fin: Finalize "Form Union"

Materials
  mat1: Common "Perfect_Vaccum" on all domains
    def: def "Basic"
      relpermittivity = 1
      relpermeability = 1
      electricconductivity = 0

Physics
  emw: ElectromagneticWaves "Electromagnetic Waves, Frequency Domain" on all domains
    dependent variable E = {Ex, Ey, Ez}
    wee1: WaveEquationElectric (default)
    pec1: PerfectElectricConductor (default)
    init1: init "Initial Values 1" (default)
    pec2: PerfectElectricConductor on boundaries 1, 2, 5, 6
    port1: Port on boundaries 3
      SpecifyDepositedPower = 0
      PortSlit = 0
      SlitType = PECBacked
      PortOrientation = ReversePort
      PortType = Numeric
      PortModeType = TE
    port2: Port on boundaries 4 | PortSlit = 0; PortOrientation = ForwardPort; numericTEM = 0; PortType = Numeric

Mesh
  mesh1 "Mesh 1" (physics-controlled)
    size: MeshSizeDefault | hauto = 4

Studies
  std1 "Study 1"
    bma: BoundaryModeAnalysis | modeFreq = 5[GHz]; shift = 0.711; linpsolnum = auto
    bma1: BoundaryModeAnalysis | PortName = 2; modeFreq = 5[GHz]; shift = 0.711; linpsolnum = auto
    freq: Frequency "Frequency Domain" | punit = GHz; plist = 5[GHz]

Solver configurations
  sol1 "Solution 1" (study std1)
    v1: Variables "Dependent Variables 1"
    e1: Eigenvalue "Eigenvalue Solver 1"
      dDef: Direct
    su1: StoreSolution "Solution Store 1"
    v2: Variables "Dependent Variables 2"
    e2: Eigenvalue "Eigenvalue Solver 2"
      dDef: Direct
    su2: StoreSolution "Solution Store 2"
    v3: Variables "Dependent Variables 3"
    s1: Stationary "Stationary Solver 1"
      p1: Parametric
      fc1: FullyCoupled
      i1: Iterative "Suggested Iterative Solver (emw)"
        mg1: Multigrid
  sol2 "Solution Store 1" (study std1)
  sol3 "Solution Store 2" (study std1)

Datasets
  dset1: Solution | solution = sol1
  dset2: Solution | solution = sol2
  dset3: Solution | solution = sol3
  cln1: CutLine3D | data = dset1; genpoints = {{0, 0, 0}, {1, 0, 400}}
  cln2: CutLine3D | data = dset1; genpoints = {{0, 0, -2.40742E-32}, {0, 0, 500}}

Derived values
  gev1: EvalGlobal "S-parameter (emw)" | data = dset1; table = tbl5; expr = {emw.S11dB, emw.S21dB}
  gev2: EvalGlobal "S-parameter (emw) 1" | data = dset1; table = tbl6; expr = {emw.S11dB, emw.S21dB}
  gev3: EvalGlobal "Phase Velocity"
    data = dset1
    table = tbl7
    expr = {c_const / emw.neff_1, }
    unit = {m/s, }
    descr = {Phase Velocity, }
  gev4: EvalGlobal "Wave Impedance" | data = dset1; table = tbl8; expr = Z0_const / emw.neff_1; descr = Wave Impedance
  max1: MaxVolume "Emax" on domains 1
    data = dset1
    table = tbl9
    expr = {emw.normE, }
    unit = {V/m, }
    descr = {Electric field norm, }
  gev5: EvalGlobal "Power Max" | data = dset1; table = tbl10; expr = (3e6 /1126.2)^2 * 1[W]; unit = MW
  gev6: EvalGlobal "F_cutoff_numerical"
    data = dset1
    table = tbl11
    expr = emw.neff_1*5[GHz]
    unit = GHz
    descr = Numerical Evaluation of Cut off Frequency

Tables
  tbl1: Table
    // Global Evaluation 1
    freq (GHz) | power Max (MW)
    5 | 7.3046
  tbl2: Table
    // Volume Maximum 1
    freq (GHz) | Electric field norm (V/m) | Electric field norm (V/m) | Impedance (Ω)
    5 | 1110.02 | 1110.02 | 541.148
  tbl3: Table
    Eigenvalue | S11 (1) | S21 (1)
    1.25879e-17-74.548i | -inf | -inf
  tbl4: Table
    Eigenvalue | S11 (1) | S21 (1)
    2.36652e-17-74.548i | -inf | -inf
  tbl5: Table
  tbl6: Table
    freq (GHz) | S11 (1) | S21 (1)
    5 | -87.4455 | -1.70658e-06
  tbl7: Table
    // Phase Velocity
    freq (GHz) | Phase Velocity (m/s)
    5 | 4.21419e+08
  tbl8: Table
    // Global Evaluation 4
    freq (GHz) | Wave Impedance (Ω)
    5 | 529.57
  tbl9: Table
    // Volume Maximum 1
    freq (GHz) | Electric field norm (V/m) | Pmax (s^3*A^2/kg) | Electric field norm (V/m)
    5 | 1126.26 | 3.51825e+12 | 1126.26
  tbl10: Table
    // Power Max
    freq (GHz) | (3e6 /1126.2)^2 * 1[W] (W) | (3e6 /1126.2)^2 * 1[W] (MW)
    5 | 7.09596e+06 | 7.09596
  tbl11: Table
    // F_cutoff_numerical
    freq (GHz) | emw.neff_1*5[GHz] (GHz) | Numerical Evaluation of Cut off Frequency (GHz)
    5 | 3.55694 | 3.55694

Plots
  pg1: PlotGroup3D "Electric Field (emw)" | data = dset1
    mslc1: Multislice | expr = emw.normE
      filt1: Filter | expr = !isScalingSystemDomain
  pg2: PlotGroup3D "Electric Field, Logarithmic (emw)" | data = dset1
    surf1: Surface | expr = 1
      sel1: Selection on boundaries 1, 2, 5, 6
      tran1: Transparency | transparency = 0.85
      mtrl1: MaterialAppearance | appearance = custom; family = aluminumpolished
    surf2: Surface | expr = emw.normE
      sel1: Selection on boundaries 3, 4
      tran1: Transparency | transparency = 0.7
  pg3: PlotGroup3D "Electric Mode Field, Port 1 (emw)" | data = dset1
    surf1: Surface | expr = root.comp1.emw.normEbm_1
    ann1: Annotation | text = Effective mode index: eval(comp1.emw.neff_1)
  pg4: PlotGroup3D "Electric Mode Field, Port 2 (emw)" | data = dset1
    surf1: Surface | expr = root.comp1.emw.normEbm_2
    ann1: Annotation | text = Effective mode index: eval(comp1.emw.neff_2)
  pg5: PlotGroup3D "Electric Field (emw) 1" | data = dset2
    mslc1: Multislice | expr = emw.normE
      filt1: Filter | expr = !isScalingSystemDomain
  pg6: PlotGroup3D "Electric Mode Field, Port 1 (emw) 1" | data = dset2
    surf1: Surface | expr = root.comp1.emw.normEbm_1
  pg7: PlotGroup3D "Electric Mode Field, Port 2 (emw) 1" | data = dset2
    surf1: Surface | expr = root.comp1.emw.normEbm_2
  pg8: PlotGroup3D "Electric Field (emw) 2" | data = dset3
    mslc1: Multislice | expr = emw.normE
      filt1: Filter | expr = !isScalingSystemDomain
  pg9: PlotGroup3D "Electric Mode Field, Port 1 (emw) 2" | data = dset3
    surf1: Surface | expr = root.comp1.emw.normEbm_1
  pg10: PlotGroup3D "Electric Mode Field, Port 2 (emw) 2" | data = dset3
    surf1: Surface | expr = root.comp1.emw.normEbm_2
  pg11: PlotGroup1D "1D Plot Group 11" | data = dset1
    lngr1: LineGraph | data = cln1; expr = emw.Ey